**------------------------------------BOF---------------------------------------
**
**------------------------------------------------------------------------------
**
**                             M O D E L  D A T A
**
**------------------------------------------------------------------------------
**
**------------------------------------------------------------------------------
**    INCLUDES
**------------------------------------------------------------------------------
**
*INCLUDE, INPUT=?include_path?
**
**------------------------------------------------------------------------------
**    SURFACE INTERACTION
**------------------------------------------------------------------------------
**
*SURFACE INTERACTION, NAME=SI1000;Fric_0p1
*FRICTION
 0.1
**
**------------------------------------------------------------------------------
**    CONTROLS
**------------------------------------------------------------------------------
**
*PREPRINT, MASS PROPERTY=YES
**
**------------------------------------------------------------------------------
**
**                          H I S T O R Y  D A T A
**
**------------------------------------------------------------------------------
**
**------------------------------------------------------------------------------
**    STEP
**------------------------------------------------------------------------------
**
*STEP, NAME=?step_name?
*DYNAMIC, EXPLICIT,
          ELEMENT BY ELEMENT,
          IMPROVED DT METHOD=YES,
          SCALE FACTOR=1.0
** blank,      time, minDt,   maxDt
        , 100.0e-03,      , 1.0e-06
**
**------------------------------------------------------------------------------
**    MASS SCALING
**------------------------------------------------------------------------------
**
*VARIABLE MASS SCALING, DT=0.5E-06, FREQUENCY=10, TYPE=BELOW MIN
**
**------------------------------------------------------------------------------
**    CONTACT
**------------------------------------------------------------------------------
**
*DIAGNOSTICS, CONTACT INITIAL OVERCLOSURE=SUMMARY
**
*CONTACT
*CONTACT INCLUSIONS, ALL EXTERIOR
*CONTACT PROPERTY ASSIGNMENT
 , , SI1000;Fric_0p1
**
**------------------------------------------------------------------------------
**    OUTPUT
**------------------------------------------------------------------------------
**
** field output
**
*OUTPUT, FIELD, TIME INTERVAL=1.0e-03
*NODE OUTPUT
 UT
**
** history output
**
*OUTPUT, HISTORY, TIME INTERVAL=0.1e-03
*INCREMENTATION OUTPUT
 DT, DMASS
*ENERGY OUTPUT
 ALLAE, ALLIE, ALLKE, ALLPW, ETOTAL
**
*END STEP
**------------------------------------EOF---------------------------------------
